*Heading
** Job name: Job-1 Model name: Truss
** Generated by: Abaqus/CAE 2022.HF8
*Preprint, echo=NO, model=NO, history=NO, contact=NO
**
** PARTS
**
*Part, name=Part-1
*Node
      1,        2060.,        1000.
      2,        1700.,           0.
      3,        1250.,         225.
      4,           0.,         850.
      5,           0.,        1750.
*Element, type=T2D2
1, 1, 2
2, 2, 3
3, 3, 4
4, 4, 5
5, 5, 3
*Nset, nset=Set-1
 1, 2
*Elset, elset=Set-1
 1,
*Nset, nset=Set-2, generate
 2,  5,  1
*Elset, elset=Set-2, generate
 2,  5,  1
** Section: section1
*Solid Section, elset=Set-1, material=Steel
1000.,
** Section: Section-2
*Solid Section, elset=Set-2, material=Steel
100.,
*End Part
**
**
** ASSEMBLY
**
*Assembly, name=Assembly
**
*Instance, name=Part-1-1, part=Part-1
*End Instance
**
*Nset, nset=Set-1, instance=Part-1-1
 1, 5
*Nset, nset=Set-2, instance=Part-1-1
 4,
*End Assembly
**
** MATERIALS
**
*Material, name=Steel
*Density
 7.8e-06,
*Elastic
209000., 0.3
**
** BOUNDARY CONDITIONS
**
** Name: pinned Type: Symmetry/Antisymmetry/Encastre
*Boundary
Set-1, PINNED
** Name: roller Type: Displacement/Rotation
*Boundary
Set-2, 1, 1
Set-2, 6, 6
** ----------------------------------------------------------------
**
** STEP: modal
**
*Step, name=modal, nlgeom=NO, perturbation
*Frequency, eigensolver=Lanczos, sim, acoustic coupling=on, normalization=mass
2, , , , ,
**
** OUTPUT REQUESTS
**
*Restart, write, frequency=0
**
** FIELD OUTPUT: F-Output-1
**
*Output, field
*Node Output
U,
**
** HISTORY OUTPUT: H-Output-1
**
*Output, history
*Energy Output
ALLKE, ALLSE
*End Step
